// SBML level 3 version 2

model kappa_resimulation_figure2()

  // Compartments:
  compartment default = 1;

  // Species:
  substanceOnly species __s0 in default = K_0; __s0 is "K(d=None, x='u')";
  substanceOnly species __s1 in default = S_0; __s1 is "S(d=None, x='u')";
  substanceOnly species __s2 in default = 0; __s2 is "K(d=None, x='p')";
  substanceOnly species __s3 in default = 0; __s3 is "K(d=1, x='u') ._br_S(d=1, x='u')";
  substanceOnly species __s4 in default = 0; __s4 is "K(d=1, x='p') ._br_S(d=1, x='u')";
  substanceOnly species __s5 in default = 0; __s5 is "K(d=1, x='u') ._br_S(d=1, x='p')";
  substanceOnly species __s6 in default = 0; __s6 is "K(d=1, x='p') ._br_S(d=1, x='p')";
  substanceOnly species __s7 in default = 0; __s7 is "S(d=None, x='p')";

  // Parameters:
  off_rate_fast = 1000;
  off_rate_slow = 1;
  mod_rate = 5;
  mod_rate_slow = 0.05;
  on_rate = 1;
  K_0 = 1000;
  S_0 = 100;
  var __obs0; __obs0 is "obsK";
  var __obs1; __obs1 is "obsS";

  // Assignment rules:
  __obs0 := __s0 + __s3 + __s5;
  __obs1 := __s1 + __s3 + __s4;

  // Reactions:
  r0: __s0 => __s2; __s0*mod_rate_slow; r0 is "pK";
  b_u: __s0 + __s1 -> __s3; __s0*__s1*on_rate - __s3*off_rate_fast; b_u is "b + u";
  r2: __s3 => __s4; __s3*mod_rate_slow; r2 is "pK";
  r3: __s1 + __s2 -> __s4; __s1*__s2*on_rate - __s4*off_rate_slow; r3 is "b + u_slow";
  r4: __s3 => __s5; __s3*mod_rate; r4 is "p";
  r5: __s5 => __s6; __s5*mod_rate_slow; r5 is "pK";
  u_b: __s5 -> __s0 + __s7; -(__s0*__s7*on_rate) + __s5*off_rate_fast; u_b is "u + b";
  r7: __s4 => __s6; __s4*mod_rate; r7 is "p";
  r8: __s2 + __s7 -> __s6; __s2*__s7*on_rate - __s6*off_rate_slow; r8 is "b + u_slow";
end
